N := 9
K := 83
p := K*exp(10*N/K)
q := N*0.918272 + 2*K
data := READPRN("lab2_output.csv")
a := π*(N + 10)
b := a + K/50 + 2
u(x) := sin((π*x - π*b)/(b - a))^2
xi := data[:, 0]
ui := data[:, 1]
uis := (ui - min(ui))/(2*max(ui))
d2u(x) := 2*π^2*cos((2*π*x - 2*π*b)/(b - a))/(b - a)^2
uis[0] = 0.230624
f(x) := p*d2u(x) + q*u(x)
uis[1] = 0.196121
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-p*d^2/dx^2(u(x)) + q*u(x) → 174.264448*sin(0.858358648522*x - 54.3772439161)^2 - 83*e^(90/83)*(5000*π^2*cos(50*π*x/183 - 50*π*(19*π + 183/50)/183)^2/33489 - 5000*π^2*sin(50*π*x/183 - 50*π*(19*π + 183/50)/183)^2/33489)
N := 9
K := 83
C_p := 120
p(x) := sin(N*x^(mod(K, 4) + 2)) + 2*cos(2*K)*x + C_p
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